# OpenSim document version 40500
Model inverted_pendulum:
  Body: mass=1 [kg] mass_center=(0 0 0) inertia=(1 1 1 0 0 0)
    PhysicalOffsetFrame body_center: socket_parent=.. translation=(-0.5 0 0) [meters]
      Ellipsoid body_center_geom_1: radii=(0.5 0.1 0.1)
  PinJoint pin: socket_parent_frame=ground_offset socket_child_frame=body_offset
    Coordinate angle
    PhysicalOffsetFrame ground_offset: socket_parent=/ground translation=(0 0 0)
    PhysicalOffsetFrame body_offset: socket_parent=/body translation=(-1 0 0)
  Ground
  ForceSet:
    CoordinateActuator actuator: coordinate=angle optimal_force=1
