# OpenSim document version 40500
MocoStudy minimize_control_effort:
  MocoProblem problem:
    MocoPhase phases:
      ModelProcessor model:
        model: Model inverted_pendulum:
          Body: mass=1 [kg] mass_center=(0 0 0) inertia=(1 1 1 0 0 0)
            PhysicalOffsetFrame body_center: socket_parent=.. translation=(-0.5 0 0) [meters]
              Ellipsoid body_center_geom_1: radii=(0.5 0.1 0.1)
          PinJoint pin: socket_parent_frame=ground_offset socket_child_frame=body_offset
            Coordinate angle
            PhysicalOffsetFrame ground_offset: socket_parent=/ground translation=(0 0 0)
            PhysicalOffsetFrame body_offset: socket_parent=/body translation=(-1 0 0)
          Ground
          ForceSet:
            CoordinateActuator actuator: coordinate=angle optimal_force=1
      MocoInitialBounds time_initial_bounds: bounds=0
      MocoFinalBounds time_final_bounds: bounds=1
      state_infos:
        MocoVariableInfo /pin/angle/value: bounds=(-10 10) initial_bounds=0 final_bounds=3.141593
        MocoVariableInfo /pin/angle/speed: bounds=(-50 50) initial_bounds=0 final_bounds=0
      control_infos: MocoVariableInfo /forceset/actuator: bounds=(-100 100)
      goals: MocoControlGoal goal
  MocoCasADiSolver solver:
    num_mesh_intervals: 50
    optim_convergence_tolerance: 0.001
