# OpenSim document version 40500
Model InvertedPendulumModel:
  gravity: 0 -9.80665 0
  Ground
  BodySet:
    Body Base: mass=1 [kg] inertia=(1 1 1 0 0 0)
      Brick Base_geom_1: half_lengths=(0.13 0.025 0.0485)
    Body Beam: mass=5 inertia=(1 1 1 0 0 0)
      Brick Beam_geom_1: half_lengths=(0.015 0.5 0.0485)
  JointSet:
    WeldJoint BaseToGround: socket_parent_frame=ground_offset socket_child_frame=Base_offset
      PhysicalOffsetFrame ground_offset: socket_parent=/ground translation=(0 0 0) [meters]
      PhysicalOffsetFrame Base_offset: socket_parent=/bodyset/Base translation=(0 -0.025 0)
    PinJoint BeamToBase: socket_parent_frame=Base_offset socket_child_frame=Beam_offset
      Coordinate Angle_rz: default_value=0 range=(-1.570796 1.570796)
      PhysicalOffsetFrame Base_offset: socket_parent=/bodyset/Base translation=(-0.13 0.025 0)
      PhysicalOffsetFrame Beam_offset: socket_parent=/bodyset/Beam translation=(0 -0.5 0)
  ForceSet:
    TorqueActuator AnkleExo: bodyA=Base bodyB=Beam axis=(0 0 1) optimal_force=1
