# OpenSim document version 40500
Model InvertedPendulumModel:
  gravity: 0 -9.80665 0
  Ground
  BodySet:
    Body Base: mass=1 [kg] inertia=(1 1 1 0 0 0)
      Brick Base_geom_1: half_lengths=(0.5 0.1 0.2)
    Body Beam: mass=5 mass_center=(0 0 0) inertia=(1 1 1 0 0 0)
      Brick Beam_geom_1: half_lengths=(0.06 2 0.2)
  JointSet:
    WeldJoint BaseToGround: socket_parent_frame=ground_offset socket_child_frame=Base_offset
      PhysicalOffsetFrame ground_offset: socket_parent=/ground translation=(0 0 0) [meters]
      PhysicalOffsetFrame Base_offset: socket_parent=/bodyset/Base translation=(0 -0.1 0)
    PinJoint BeamToBase: socket_parent_frame=Base_offset socket_child_frame=Beam_offset
      Coordinate ankle_angle: default_value=0 range=(-1.570796 1.570796)
      PhysicalOffsetFrame Base_offset: socket_parent=/bodyset/Base translation=(-0.5 0.1 0)
      PhysicalOffsetFrame Beam_offset: socket_parent=/bodyset/Beam translation=(0.06 -2 0)
  ControllerSet:
    PrescribedController LinearRamp_Controller: actuator_list=AnkleExo
      FunctionSet ControlFunctions: LinearFunction(coefficients=500 10)
  ForceSet:
    CoordinateActuator AnkleExo: coordinate=ankle_angle optimal_force=1
    HuntCrossleyForce BeamBackContactForce: transition_velocity=0.2
      ContactParametersSet contact_parameters:
        ContactParameters: geometry=(BeamBackContact GroundContact) stiffness=100000 dissipation=2 static_friction=0.8
            dynamic_friction=0.6 viscous_friction=0.2
    HuntCrossleyForce BeamFrontContactForce: transition_velocity=0.2
      ContactParametersSet contact_parameters:
        ContactParameters: geometry=(BeamFrontContact GroundContact) stiffness=100000 dissipation=2 static_friction=0.8
            dynamic_friction=0.6 viscous_friction=0.2
  ContactGeometrySet:
    ContactSphere BeamBackContact: socket_frame=/bodyset/Beam location=(-0.06 2 0) radius=0.04
    ContactSphere BeamFrontContact: socket_frame=/bodyset/Beam location=(0.06 2 0) radius=0.04
    ContactHalfSpace GroundContact: socket_frame=/ground location=(0 0.025 0) orientation=(0 0 -1.57)
