# OpenSim document version 40500
Model InvertedPendulumModel:
  gravity: 0 -9.80665 0
  Ground
  BodySet:
    Body Base: mass=1 [kg] inertia=(1 1 1 0 0 0)
      Brick Base_geom_1: half_lengths=(0.5 0.1 0.2)
    Body Beam: mass=5 mass_center=(0 0 0) inertia=(1 1 1 0 0 0)
      Brick Beam_geom_1: half_lengths=(0.06 2 0.2)
  JointSet:
    FreeJoint BaseToGround: socket_parent_frame=ground_offset socket_child_frame=Base_offset
      Coordinate BaseToGround_coord_0
      Coordinate BaseToGround_coord_1
      Coordinate BaseToGround_coord_2
      Coordinate BaseToGround_coord_3
      Coordinate BaseToGround_coord_4
      Coordinate BaseToGround_coord_5
      PhysicalOffsetFrame ground_offset: socket_parent=/ground translation=(0 0 0) [meters]
      PhysicalOffsetFrame Base_offset: socket_parent=/bodyset/Base translation=(0 -0.1 0)
    PinJoint BeamToBase: socket_parent_frame=Base_offset socket_child_frame=Beam_offset
      Coordinate ankle_angle: default_value=0 range=(-1.570796 1.570796)
      PhysicalOffsetFrame Base_offset: socket_parent=/bodyset/Base translation=(-0.44 0.1 0)
      PhysicalOffsetFrame Beam_offset: socket_parent=/bodyset/Beam translation=(0 -2 0)
  ForceSet:
    ExpressionBasedCoordinateForce: coordinate=ankle_angle expression=-500*q-50*qdot
  ContactGeometrySet:
    ContactHalfSpace GroundContact: socket_frame=/ground location=(0 0.025 0) orientation=(0 0 -1.57)
    ContactSphere heel: socket_frame=/bodyset/Base location=(-0.4 0 0) radius=0.035
    ContactSphere front: socket_frame=/bodyset/Base location=(0.4 0 0) radius=0.035
  ComponentSet:
    SmoothSphereHalfSpaceForce contactHeel: socket_sphere=/contactgeometryset/heel
        socket_half_space=/contactgeometryset/GroundContact stiffness=3067776 [N/m^2] dissipation=2 [s/m]
        static_friction=0.8 dynamic_friction=0.4 viscous_friction=0.4 transition_velocity=0.2 [m/s]
    SmoothSphereHalfSpaceForce contactHeel_0: socket_sphere=/contactgeometryset/front
        socket_half_space=/contactgeometryset/GroundContact stiffness=3067776 dissipation=2 static_friction=0.8
        dynamic_friction=0.4 viscous_friction=0.4 transition_velocity=0.2
