# OpenSim document version 40500
Model assisted_ideal_fixed_footbody:
  gravity: 0 -9.80665 0
  Ground
  BodySet:
    Body Foot: mass=2.32 [kg] inertia=(1 1 1 0 0 0) meshes=wedge_foot.vtp
    Body Pendulum: mass=77.68 inertia=(1 1 1 0 0 0)
      Cylinder Pendulum_geom_1: radius=0.03471 half_height=0.51175
  JointSet:
    WeldJoint BaseToGround: socket_parent_frame=ground_offset socket_child_frame=Foot_offset
      PhysicalOffsetFrame ground_offset: socket_parent=/ground translation=(0 0 0) [meters]
      PhysicalOffsetFrame Foot_offset: socket_parent=/bodyset/Foot translation=(0 0 0)
    PinJoint Ankle: socket_parent_frame=Foot_offset socket_child_frame=Pendulum_offset
      Coordinate Ankle_Angle: default_value=0 range=(-0.7853982 0.7853982)
      PhysicalOffsetFrame Foot_offset: socket_parent=/bodyset/Foot translation=(-0.0838736 0.06942 0)
      PhysicalOffsetFrame Pendulum_offset: socket_parent=/bodyset/Pendulum translation=(0 -0.51175 0)
  ForceSet:
    ExpressionBasedCoordinateForce AnkleExo: coordinate=Ankle_Angle expression=-401.6214*q-183.4599*qdot
    CoordinateActuator ankle_torque: min_control=-100 max_control=100 coordinate=Ankle_Angle optimal_force=1
