# OpenSim document version 40500
Model assisted_ideal_free_footbody:
  gravity: 0 -9.80665 0
  Ground
  BodySet:
    Body Foot: mass=2.32 [kg] inertia=(1 1 1 0 0 0) meshes=wedge_foot.vtp
    Body Pendulum: mass=77.68 inertia=(1 1 1 0 0 0)
      Cylinder Pendulum_geom_1: radius=0.03471 half_height=0.51175
  JointSet:
    CustomJoint FootToGround: socket_parent_frame=ground_offset socket_child_frame=Foot_offset
      Coordinate ground_rz: default_value=0 range=(-3.141593 3.141593)
      Coordinate ground_ty: default_value=0 range=(-3.141593 3.141593)
      Coordinate ground_tz: default_value=0 range=(-3.141593 3.141593)
      PhysicalOffsetFrame ground_offset: socket_parent=/ground translation=(0 0 0) [meters]
      PhysicalOffsetFrame Foot_offset: socket_parent=/bodyset/Foot translation=(0 0 0)
      SpatialTransform: axes_held_at_zero=(rotation1 rotation2 translation1)
        TransformAxis rotation3: coordinates=ground_rz axis=(0 0 1) LinearFunction(coefficients=1 0)
        TransformAxis translation2: coordinates=ground_ty axis=(0 1 0) LinearFunction(coefficients=1 0)
        TransformAxis translation3: coordinates=ground_tz axis=(0 0 1) LinearFunction(coefficients=1 0)
    PinJoint Ankle: socket_parent_frame=Foot_offset socket_child_frame=Pendulum_offset
      Coordinate Ankle_Angle: default_value=0 range=(-0.7853982 0.7853982)
      PhysicalOffsetFrame Foot_offset: socket_parent=/bodyset/Foot translation=(-0.0838736 0.06942 0)
      PhysicalOffsetFrame Pendulum_offset: socket_parent=/bodyset/Pendulum translation=(0 -0.51175 0)
  ForceSet:
    ExpressionBasedCoordinateForce AnkleExo: coordinate=Ankle_Angle
        expression=(-401.6214*(-0.05392386353963117-q))-183.4599*qdot
    CoordinateActuator ankle_torque: min_control=-100 max_control=100 coordinate=Ankle_Angle optimal_force=1
  ContactGeometrySet:
    ContactHalfSpace GroundContact: socket_frame=/ground location=(0 0.025 0) orientation=(0 0 -1.57)
    ContactSphere Base_Ground_Heel: socket_frame=/bodyset/Foot location=(-0.121752 0 0) radius=0.035
    ContactSphere Base_Ground_Toe: socket_frame=/bodyset/Foot location=(0.121752 0 0) radius=0.035
  ComponentSet:
    SmoothSphereHalfSpaceForce Contact_Base_Ground_Heel: socket_sphere=/contactgeometryset/Base_Ground_Heel
        socket_half_space=/contactgeometryset/GroundContact stiffness=3067776 [N/m^2] dissipation=0.4163 [s/m]
        static_friction=0.8 dynamic_friction=0.4 viscous_friction=0.4 transition_velocity=0.1327 [m/s]
    SmoothSphereHalfSpaceForce Contact_Base_Ground_Toe: socket_sphere=/contactgeometryset/Base_Ground_Toe
        socket_half_space=/contactgeometryset/GroundContact stiffness=3067776 dissipation=0.4163 static_friction=0.8
        dynamic_friction=0.4 viscous_friction=0.4 transition_velocity=0.1327
